# OpenSim document version 40000
InverseKinematicsTool generic:
  constraint_weight: Inf
  accuracy: 1e-5
  time_range: -Inf Inf
  report_errors: true
  report_marker_locations: false
  IKTaskSet:
    IKMarkerTask Neck: apply=true weight=5
    IKMarkerTask RShoulder: apply=true weight=5
    IKMarkerTask LShoulder: apply=true weight=5
    IKMarkerTask RHip: apply=true weight=25
    IKMarkerTask LHip: apply=true weight=25
    IKMarkerTask midHip: apply=true weight=25
    IKMarkerTask RKnee: apply=true weight=30
    IKMarkerTask RAnkle: apply=true weight=30
    IKMarkerTask RSmallToe: apply=true weight=30
    IKMarkerTask RBigToe: apply=true weight=30
    IKMarkerTask RHeel: apply=true weight=60
    IKMarkerTask LKnee: apply=true weight=30
    IKMarkerTask LAnkle: apply=true weight=30
    IKMarkerTask LSmallToe: apply=true weight=30
    IKMarkerTask LBigToe: apply=true weight=30
    IKMarkerTask LHeel: apply=true weight=60
    IKMarkerTask RElbow: apply=true weight=5
    IKMarkerTask LElbow: apply=true weight=5
    IKMarkerTask RWrist: apply=true weight=5
    IKMarkerTask LWrist: apply=true weight=5
