# OpenSim document version 40000
ScaleTool RajagopalModified2016_withArms:
  mass: 75.337 [kg]
  height: 1.89
  age: -1
  ModelScaler:
    apply: true
    scaling_order: measurements
    time_range: 3.41 3.66
    preserve_mass_distribution: true
    MeasurementSet:
      Measurement foot: apply=true
        MarkerPair: markers=(RHeel RSmallToe)
        MarkerPair: markers=(RHeel RBigToe)
        MarkerPair: markers=(LHeel LSmallToe)
        MarkerPair: markers=(LHeel LBigToe)
        BodyScale talus_r: axes=(X Y Z)
        BodyScale calcn_r: axes=(X Y Z)
        BodyScale toes_r: axes=(X Y Z)
        BodyScale talus_l: axes=(X Y Z)
        BodyScale calcn_l: axes=(X Y Z)
        BodyScale toes_l: axes=(X Y Z)
      Measurement tibia_r: apply=true
        MarkerPair: markers=(RKnee RAnkle)
        BodyScale tibia_r: axes=(X Y Z)
      Measurement femur_r: apply=true
        MarkerPair: markers=(RHip RKnee)
        BodyScale femur_r: axes=(X Y Z)
        BodyScale patella_r: axes=(X Y Z)
      Measurement tibia_l: apply=true
        MarkerPair: markers=(LKnee LAnkle)
        BodyScale tibia_l: axes=(X Y Z)
      Measurement femur_l: apply=true
        MarkerPair: markers=(LHip LKnee)
        BodyScale femur_l: axes=(X Y Z)
        BodyScale patella_l: axes=(X Y Z)
      Measurement pelvisXYZ: apply=true
        MarkerPair: markers=(RHip LHip)
        BodyScale pelvis: axes=(X Y Z)
      Measurement torsoXY: apply=true
        MarkerPair: markers=(RShoulder RHip)
        MarkerPair: markers=(LShoulder LHip)
        BodyScale torso: axes=(X Y)
      Measurement torsoZ: apply=true
        MarkerPair: markers=(RShoulder LShoulder)
        BodyScale torso: axes=Z
      Measurement humerus: apply=true
        MarkerPair: markers=(RShoulder RElbow)
        MarkerPair: markers=(LShoulder LElbow)
        BodyScale humerus_r: axes=(X Y Z)
        BodyScale humerus_l: axes=(X Y Z)
      Measurement radius: apply=true
        MarkerPair: markers=(LElbow LWrist)
        MarkerPair: markers=(RElbow RWrist)
        BodyScale ulna_r: axes=(X Y Z)
        BodyScale radius_r: axes=(X Y Z)
        BodyScale hand_r: axes=(X Y Z)
        BodyScale ulna_l: axes=(X Y Z)
        BodyScale radius_l: axes=(X Y Z)
        BodyScale hand_l: axes=(X Y Z)
  MarkerPlacer:
    apply: true
    time_range: 3.41 3.66
    max_marker_movement: -1
    IKTaskSet:
      IKMarkerTask RHip: apply=true weight=10
      IKMarkerTask LHip: apply=true weight=10
      IKMarkerTask midHip: apply=true weight=10
      IKMarkerTask RKnee: apply=true weight=10
      IKMarkerTask RAnkle: apply=true weight=10
      IKMarkerTask RHeel: apply=true weight=10
      IKMarkerTask RSmallToe: apply=true weight=10
      IKMarkerTask RBigToe: apply=true weight=10
      IKMarkerTask LKnee: apply=true weight=10
      IKMarkerTask LAnkle: apply=true weight=10
      IKMarkerTask LHeel: apply=true weight=10
      IKMarkerTask LSmallToe: apply=true weight=10
      IKMarkerTask LBigToe: apply=true weight=10
      IKMarkerTask RShoulder: apply=true weight=5
      IKMarkerTask LShoulder: apply=true weight=5
      IKMarkerTask Neck: apply=true weight=5
      IKMarkerTask RElbow: apply=true weight=1
      IKMarkerTask RWrist: apply=true weight=5
      IKMarkerTask LElbow: apply=true weight=1
      IKMarkerTask LWrist: apply=true weight=5
      IKCoordinateTask [values shared by the 11 below unless stated]: apply=true weight=0.1 value_type=manual_value
          value=0
      IKCoordinateTask hip_flexion_r
      IKCoordinateTask hip_rotation_r: apply=false
      IKCoordinateTask knee_angle_r
      IKCoordinateTask ankle_angle_r: value=0.08726646
      IKCoordinateTask hip_flexion_l
      IKCoordinateTask hip_rotation_l: apply=false
      IKCoordinateTask knee_angle_l
      IKCoordinateTask ankle_angle_l: value=0.08726646
      IKCoordinateTask lumbar_extension
      IKCoordinateTask lumbar_bending
      IKCoordinateTask lumbar_rotation
